# evaporation between three panel
# author: TZP
# Date: 2019-10-08
# Evaporation

# 体系基础设置
units       real
boundary    p f f
dimension   3
atom_style  atomic

#计算域设置
lattice     fcc 5.3118
region      box block 0 5  0 60  0 90
create_box  3 box

#create atom
region  water   block   EDGE EDGE   20.6 40.5	5.0 45.0
region  left    block   EDGE EDGE   0.5 20.5	5.0 50.0
region	right	block	EDGE EDGE	40.6 59.6	5.0 50.0


create_atoms	1	region water
create_atoms	2	region left
create_atoms	3	region right
mass			1	39.948
mass			2	195.084
mass			3	195.084
#read_restart vapor1007.restart.1000000
#write_data	data.setup.txt nocoeff

# 相互作用
pair_style	lj/cut 17.025
pair_coeff	1 1	0.238065 3.405 17.025
pair_coeff	2*3 2*3 13.1 3.405 17.025
pair_coeff	1 2*3 0.2 3.405 17.025
#遍历域
neighbor		2.0 bin
neigh_modify	every 20 delay 0 check no
#控温&镜面边界条件
group	argon	type 1
group	walls	type 2 3
fix		fixwall	walls	spring/self	1.0
#velocity	all	create	100.0 53627542
# fix fixall all nve 动力学积分
fix     temp1   walls	nvt   temp	  100.0 100.0 100.0
fix     temp2   argon   nvt   temp    100.0 100.0 100.0
fix	    zwalls	all     wall/reflect	zhi EDGE		# reflect wall
#fix zwalls2 argon wall/lj126   zlo EDGE 0.2 3.405 17.025
fix	    ywalls	all     wall/reflect	ylo EDGE	yhi EDGE
#fix argongravity argon gravity 9.37e-14 vector 0 0 -1

#气液相识别
compute voro argon voronoi/atom
dump output_voro argon  custom 2000 voro.20200314.data.txt id c_voro[1]

variable vapor atom c_voro[1]>323
variable liquid atom c_voro[1]<=323
group vapor dynamic argon var vapor every 10
group liquid dynamic argon var liquid every 10

#温度输出
compute liquidtemp liquid temp
compute vaportemp vapor temp
compute walltemp walls temp
fix temp all ave/time 100 100 10000 c_liquidtemp c_vaportemp c_walltemp file temp.20191007.data.txt


dump	dump1	all	atom 2000 dump.20200314.evapor.lammpstrj
restart	50000	vapor20200314.restart

thermo	2000
thermo_modify flush yes
timestep	1
run		1000000
